# LAMMPS test
units metal
atom_style atomic
lattice fcc 3.615
region box block 0 2 0 2 0 2
create_box 1 box
create_atoms 1 box
pair_style lj/cut 2.5
pair_coeff 1 1 1.0 1.0
mass 1 1.0
velocity all create 300 12345
timestep 0.001
thermo 10
dump 1 all custom 10 traj.lammpstrj id type x y z
run 20
